# Лабораторна робота №1
# Філоненко Дмитро ІК-03
# Ініціалізація значень σ і α
σ := 1
α := 100
# Ініціалізація випадкових чисел згідно варіанту
randomDigits :=
    j ← 0
    for i ∈ 0 .. 10000
        res[j] ← σ*sum(rnd(1), k = 1 .. 12) - 6 + α
        j ← j + 1
    res
myDigits := randomDigits
myDigits = [
    101.586; 101.625; 100.64; 99.7139; 98.8422; 100.135; 100.519; 100.943; 100.081; 100.531
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]
F(x) :=
    j ← 0
    for i ∈ 0 .. 10000
        res[j] ← 1/(σ*sqrt(2*π))*exp(-(x[i] - α)^2/(2*σ^2))
        j ← j + 1
    res
F(myDigits) = [
    0.113507; 0.106569; 0.325086; 0.382948; 0.204098; 0.395348; 0.348764; 0.255745; 0.39765; 0.346397
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]
# Кількість значень у масиві
n := length(randomDigits) = 10001
i := 0 .. n - 1
# Кількість інтервалів у гістограмі
m := 20
j := 0 .. m
# Довжина інтервалу
Δx := (max(myDigits) - min(myDigits))/(m - 1)
Δx = 0.379538
max(myDigits) = 103.498
min(myDigits) = 96.2864
# Поділ на інтервали
x[j] := min(myDigits) - Δx/2 + j*Δx
length(x) = 21
transpose(x) = [96.0966, 96.4762, 96.8557, 97.2352, 97.6148, 97.9943, 98.3738, 98.7534, 99.1329, 99.5125, 99.892, 100.272, 100.651, 101.031, 101.41, 101.79, 102.169, 102.549, 102.928, 103.308, 103.687]
# Кількість влучень в інтервал
h := hist(x, myDigits)
transpose(h) = [2, 6, 15, 54, 158, 299, 539, 850, 1133, 1400, 1557, 1383, 1098, 707, 430, 221, 91, 43, 13, 2]
# Оцінка середнього значення випадкової величини
μ := mean(myDigits) = 100.012
# Оцінка середнього квадратичного відхилення
ω := sqrt(n/(n - 1))*stdev(myDigits) = 1.00001
# Побудова гістограм частот
z := μ - 4*ω, μ - 4*ω + 0.01 .. μ + 4*ω
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# Розрахунок теоретично очікуваної кількості влучень
j := 0 .. m - 1
h_teor[j] := (pnorm(x[j + 1], μ, ω) - pnorm(x[j], μ, ω))*n
transpose(h_teor) = [1.58381, 5.96595, 19.489, 55.2132, 135.66, 289.082, 534.273, 856.412, 1190.65, 1435.73, 1501.58, 1362.11, 1071.68, 731.308, 432.83, 222.182, 98.9168, 38.1936, 12.7897, 3.71426]
# Побудова функції, що виконує об'єднання сусідніх груп у разі, якщо кількість влучень менша п'яти
grup(v, w) :=
    j ← 0
    for i ∈ 0 .. length(v) - 1
        if v[i] ≥ 5
            a[j] ← v[i]
            b[j] ← w[i]
            j ← j + 1
        otherwise
            if i == length(v) - 1
                a[j - 1] ← a[j - 1] + v[i]
                b[j - 1] ← b[j - 1] + w[i]
            otherwise
                v[i + 1] ← v[i] + v[i + 1]
                w[i + 1] ← w[i] + w[i + 1]
    [a; b]
# Групована спостережувана кількість влучень
H_group := grup(h, h_teor)[0]
transpose(H_group) = [8, 15, 54, 158, 299, 539, 850, 1133, 1400, 1557, 1383, 1098, 707, 430, 221, 91, 43, 15]
# Групована теоретична кількість влучень
H_group.teor := grup(h, h_teor)[1]
transpose(H_group.teor) = [7.54976, 19.489, 55.2132, 135.66, 289.082, 534.273, 856.412, 1190.65, 1435.73, 1501.58, 1362.11, 1071.68, 731.308, 432.83, 222.182, 98.9168, 38.1936, 16.504]
# Розрахунок спостережуваного значення хі-квадрат
j := 0 .. length(H_group) - 1
χ := sum((H_group[j] - H_group.teor[j])^2/H_group.teor[j], j)
χ = 14.0979
# Табличне значення хі-квадрат при рівні значимості 0.05
qchisq(0.95, m - 1 - 2) = 27.5871
# Формування відповіді
result := if(χ < qchisq(0.95, m - 3), "YES", "NO")
result = "YES"
